x := [alt_estimate; speed_estimate] → [alt_estimate; speed_estimate]  # - вектор состояний
F := [1, dt; 0, 1] → [1, dt; 0, 1]  # - матрица перехода состояний
w_state_noise := [1; 1]  # - вектор шумов состояния
u_control_vector := acc_Z_axis → acc_Z_axis  # - управляющее воздействие
B := [dt^2/2; dt] → [dt^2/2; dt]  # - матрица перехода управляющего воздействия в вектор состояний
P := [cov00, cov01; cov10, cov11] → [cov00, cov01; cov10, cov11]  # - матрица ковариаций (инициализировать как диоганальную матрицу)
Q := [Q00, Q01; Q10, Q11] → [Q00, Q01; Q10, Q11]  # - матрица шума акселерометра
R := [R00; R10] → [R00; R10]  # - матрица шума барометра
H := [1, 0]  # - матрица перехода вектора состояний в область измерений
z_predict := H*x → alt_estimate
z := [alt_baro; speed_baro] → [alt_baro; speed_baro]  # disabled
z := baro → baro
# Обновление вектора состояний
x_k := F*x + B*u_control_vector → [acc_Z_axis*dt^2/2 + speed_estimate*dt + alt_estimate; speed_estimate + acc_Z_axis*dt]
x := [alt_estimate; speed_estimate] → [alt_estimate; speed_estimate]
# Обновление матрицы ковариаций
P := F*P*transpose(F) + Q → [
    Q00 + cov00 + dt*(cov01 + cov11*dt) + cov10*dt, Q01 + cov01 + cov11*dt;
    Q10 + cov10 + cov11*dt, Q11 + cov11
]
P := [cov00, cov01; cov10, cov11] → [cov00, cov01; cov10, cov11]
# Обновление коэффициентов усиления фильтра
K := F*P*transpose(H)*(H*P*transpose(H))^-1 → [(cov00 + cov10*dt)/cov00; cov10/cov00]
K := P*transpose(H)*(H*P*transpose(H))^-1 → [1; cov10/cov00]  # - использовать эту матрицу ???
K := [Alt_KalmanGain; Speed_KalmanGain] → [Alt_KalmanGain; Speed_KalmanGain]
# Обновление оценки с помощью измерений
x := x + K*(z - H*x) → [
    alt_estimate - Alt_KalmanGain*(alt_estimate - baro);
    speed_estimate - Speed_KalmanGain*(alt_estimate - baro)
]
# Обновление матрицы ковариаций
I := [1, 0; 0, 1]
P := (I - K*H)*P → [
    -(cov00*(Alt_KalmanGain - 1)), -(cov01*(Alt_KalmanGain - 1));
    cov10 - Speed_KalmanGain*cov00, cov11 - Speed_KalmanGain*cov01
]
P := P - (K*H*P) → [
    Alt_KalmanGain*cov00*(Alt_KalmanGain - 1) - cov00*(Alt_KalmanGain - 1), Alt_KalmanGain*cov01*(Alt_KalmanGain - 1) - cov01*(Alt_KalmanGain - 1);
    cov10 - Speed_KalmanGain*cov00 + Speed_KalmanGain*cov00*(Alt_KalmanGain - 1), cov11 - Speed_KalmanGain*cov01 + Speed_KalmanGain*cov01*(Alt_KalmanGain - 1)
]
